OpenVSP model (file version 5), 8 components.
Geometry view with OpenVSP parameter names; values to 6 digits, angles in degrees, lengths in the model's unit.
Overall bounding box: X_Min=0 X_Len=25.0299 Y_Min=-18.374 Y_Len=36.748 Z_Min=-3.25619 Z_Len=6.60619

Fuselage "MyFuselage"
  location (X Y Z) 0 0 0, rotation 0 0 0
  bounding box size 24.58 4.75 6.51239
  Design: Length=24.58
  cross sections:
    n  XLocPercent  YLocPercent  ZLocPercent  shape
    0  0            0            0            ellipse Ellipse_Height=0 Ellipse_Width=0
    1  0.1          0            0            ellipse Ellipse_Height=2.5 Ellipse_Width=2.5
    2  0.2          0            0            ellipse Ellipse_Height=3.8 Ellipse_Width=3.8
    3  0.45         0            0            ellipse Ellipse_Height=5.17 Ellipse_Width=4.75
    4  0.55         0            0            ellipse Ellipse_Height=5.17 Ellipse_Width=4.7
    5  1            0            0            point

Wing "MyWing", child of "MyFuselage"
  location (X Y Z) 6.5 0 3, rotation 0 0 0
  symmetric about XZ
  bounding box size 5.2 36.748 0.520302
  totals: TotalSpan=36.748 TotalProjectedSpan=36.748 TotalChord=3.85 TotalArea=141.48 TotalAR=9.54494 MAC=4.00779
  root: chord 5.2, twist 0, NACA 4-series Camber=0 CamberLoc=0.2 ThickChord=0.1
  sections:
    n  Span    Root_Chord  Tip_Chord  Area     Sweep  Sweep_Location  Dihedral  Twist  Twist_Location  tip airfoil
    1  18.374  5.2         2.5        70.7399  0      0               0         0      0.25            as above

Ellipsoid "EllipsoidGeom", child of "MyFuselage"
  location (X Y Z) 0 0 0, rotation 0 0 0
  bounding box size 1.6 1.1 1.5
  Design: A_Radius=0.8 B_Radius=0.55 C_Radius=0.75

Propeller "NosePod", child of "MyFuselage"
  location (X Y Z) 0.2 0 0, rotation 0 0 0
  bounding box size 0.337939 5.33984 6.11013
  Design: Diameter=6.8 NumBlade=3 Beta34=20 UseBeta34Flag=1 Feather=0 Rotate=0 Precone=0 ReverseFlag=0 FoldAngle=0 PropMode=0 AF=151.538 CLi=0.538798 Chord=0.177656 Solidity=0.169649 ConstructXoC=0.5 FeatherAxisXoC=0.5 FeatherOffsetXoC=0
  cross sections:
    n  RadiusFrac  shape
    0  0.2         ellipse Ellipse_Height=0.136 Ellipse_Width=0.272
    1  0.4         NACA 16-series Chord=0.56525 IdealCl=0.7 ThickChord=0.144074
    2  1           NACA 16-series Chord=0.442 IdealCl=0.2 ThickChord=0.03
  Chord along r/R (cubic Bezier): 0.2: 0.08, 0.333333: 0.15, 0.466667: 0.2, 0.6: 0.2, 0.716667: 0.2, 0.833333: 0.2, 0.95: 0.2, 0.966667: 0.2, 0.983333: 0.2, 1: 0.13
  Twist along r/R (PCHIP): 0.2: 46.75, 0.75: 20, 1: 13
  Thick along r/R (cubic Bezier): 0.2: 0.5, 0.233333: 0.3, 0.266667: 0.225, 0.3: 0.2, 0.4: 0.125, 0.5: 0.115, 0.6: 0.1, 0.733333: 0.075, 0.866667: 0.055, 1: 0.03
  CLI along r/R (cubic Bezier): 0.2: 0, 0.266667: 0.7, 0.333333: 0.7, 0.4: 0.7, 0.466667: 0.7, 0.533333: 0.7, 0.6: 0.7, 0.733333: 0.7, 0.866667: 0.7, 1: 0.2

Wing "horizontaltail"
  location (X Y Z) 20 0 0, rotation 0 0 25
  symmetric about XZ
  bounding box size 7.77481 16.4639 0.260151
  totals: TotalSpan=12.99 TotalProjectedSpan=12.99 TotalChord=2.2 TotalArea=28.578 TotalAR=5.90455 MAC=2.22424
  root: chord 2.6, twist 0, NACA 4-series Camber=0 CamberLoc=0.2 ThickChord=0.1
  sections:
    n  Span   Root_Chord  Tip_Chord  Area    Sweep  Sweep_Location  Dihedral  Twist  Twist_Location  tip airfoil
    1  6.495  2.6         1.8        14.289  30     0               0         0      0.25            as above

Wing "verticaltail"
  location (X Y Z) 19 0 0.6, rotation 90 0 0
  bounding box size 4.3 0.43025 2.75
  totals: TotalSpan=2.75 TotalProjectedSpan=2.75 TotalChord=3.15 TotalArea=8.6625 TotalAR=0.873016 MAC=3.28995
  root: chord 4.3, twist 0, NACA 4-series Camber=0 CamberLoc=0.2 ThickChord=0.1
  sections:
    n  Span  Root_Chord  Tip_Chord  Area    Sweep  Sweep_Location  Dihedral  Twist  Twist_Location  tip airfoil
    1  2.75  4.3         2          8.6625  30     0               0         0      0.25            as above

Pod "MainPod1"
  location (X Y Z) 8 0 0, rotation 0 0 0
  bounding box size 1.2 0.16 0.16
  Design: FineRatio=15 Length=1.2

Pod "MainPod2"
  location (X Y Z) 8 0 0, rotation 0 0 0
  bounding box size 10 1.33333 1.33333
  Design: FineRatio=15 Length=10
